<?xml version="1.0"?>

<Node>
    <RequiredPlugin name="Sofa.PointCloud"/>

    <InteractiveCamera name="camera"/>
    <PointCloudRenderer camera="@camera"/>

    <PointCloudContainer name="container1" filename="splats/spot.ply"/>
    <PointCloudVisualModel name="visual" geometry="@container1" isStatic="True"/>
</Node>
